*Heading
** Job name: Straight-Rod-Unloading Model name: Straight Rod-Unloading
** Generated by: Abaqus/CAE 2021
*Preprint, echo=NO, model=NO, history=NO, contact=NO
**
** PARTS
**
*Part, name=Part-1
*Node
      1,         -2.5,           0.
      2,  -2.49499989,           0.
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*Element, type=T2D2
   1,    1,    2
   2,    2,    3
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*Nset, nset=Set-1, generate
    1,  1001,     1
*Elset, elset=Set-1, generate
    1,  1000,     1
*Nset, nset=Set-2, generate
    1,  1001,     1
*Elset, elset=Set-2, generate
    1,  1000,     1
*Nset, nset=Set-3, generate
    1,  1001,     1
*Elset, elset=Set-3, generate
    1,  1000,     1
*Nset, nset=Set-5, generate
    1,  1001,     1
*Elset, elset=Set-5, generate
    1,  1000,     1
** Section: Section-2
*Solid Section, elset=Set-5, material=Material-1
1.,
*End Part
**
**
** ASSEMBLY
**
*Assembly, name=Assembly
**
*Instance, name=Part-1-1, part=Part-1
*End Instance
**
*Nset, nset=Set-3, instance=Part-1-1
 1,
*Nset, nset=Set-4, instance=Part-1-1
 1001,
*End Assembly
*Amplitude, name=Amp-1
             0.,              1.,          0.0001,              1.,       0.0001005,              0.,          0.0004,              0.
**
** MATERIALS
**
*Material, name=Material-1
*Density
2700.,
*Elastic
 6.89e+10,0.
*Plastic
    2.76e+08,          0.
 2.76075e+08, 3.25217e-06
 2.76149e+08, 6.50435e-06
 2.76224e+08, 9.75652e-06
 2.76299e+08, 1.30087e-05
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 4.99925e+08,  0.00975001
** ----------------------------------------------------------------
**
** STEP: Step-1
**
*Step, name=Step-1, nlgeom=NO
*Dynamic, Explicit, direct user control
5e-07, 0.0004
*Bulk Viscosity
0.06, 1.2
**
** LOADS
**
** Name: Load-1   Type: Concentrated force
*Cload, amplitude=Amp-1
Set-3, 1, 3e+08
**
** OUTPUT REQUESTS
**
*Restart, write, number interval=1, time marks=NO
**
** FIELD OUTPUT: F-Output-2
**
*Output, field, time interval=1e-100
*Element Output, directions=YES
E, S
**
** HISTORY OUTPUT: H-Output-1
**
*Output, history, variable=PRESELECT
*End Step
